Sun  1 Nov 20:06:28 GMT 2020
$PROBLEM    Kim model
;
$INPUT      ID TIME SITE SITE_GRP VLQL ASSAY PAPER DVCT=DROP DV10=DROP
            DV BLQ BLOD LOQ10=DROP LOD10 LOQLN LODLN AGE MALE FEVER
            ICU ICU_D VENT VENT_D DIED TDEATH DISEASE DRUGQL DRUG LPVR
            IFN IFNA IFNB CQHCQ REMD AZIT RIBA UMIF THYM SITE_GRP2 URT
            LRT NOSE ASYMP MILD MODERATE SEVERE EVID L2 TYPE
;
$DATA      SARSCoV2_viral_dynamics_all_relevant_drugs_t_evid_L2.csv
            IGNORE=@

;
$SUBROUTINE ADVAN13 TOL=9
$MODEL      COMP=(FRAC) COMP=(VIRUS)
;
$PK
;--- Typical values
TVBET = THETA(1)
TVDEL = THETA(2)
TVVL0 = THETA(3)
TVGAM = THETA(4)
;--- Mu parameterisation
MU_1 = TVBET
MU_2 = TVDEL
MU_3 = TVVL0
MU_4 = TVGAM
;--- Individual parameters
BET  = EXP(MU_1 + ETA(1))
DELT = EXP(MU_2 + ETA(2)) + LOG(AGE/47) * THETA(9)  + MALE * THETA(10)
VL0  = EXP(MU_3 + ETA(3))
GAM  = EXP(MU_4 + ETA(4))
;---- LRT on BETA
BET = EXP(LOG(BET) + THETA(5) * LRT)
;----- drug covariate
DIFN   = THETA(6) * IFN
DLPVR  = THETA(7) * LPVR
DRIBA  = THETA(8) * RIBA
;
DELT = EXP(LOG(DELT) + DIFN + DLPVR  + DRIBA)
;--- Initial conditions
A_0(1) = 1
A_0(2) = VL0
;
$DES
DADT(1) = -BET * A(1) * A(2)
DADT(2) = GAM * A(1) * A(2) - DELT * A(2)
;--- Residual error model
$ERROR
VL = A(2)
IPRED = 0.0001
IF(VL > 0.0001) IPRED = LOG(A(2))
;
IF(TYPE == 1) SD    = SQRT(SIGMA(1,1)+SIGMA(2,2))
IF(TYPE == 2) SD    = SQRT(SIGMA(1,1)+SIGMA(3,3))
IF(TYPE == 3) SD    = SQRT(SIGMA(1,1)+SIGMA(4,4))
IF(TYPE == 4) SD    = SQRT(SIGMA(1,1)+SIGMA(5,5))
;
IRES  = DV-IPRED
IWRES = IRES/SD
;
IF(TYPE == 1)  ER = EPS(1)+EPS(2)
IF(TYPE == 2)  ER = EPS(1)+EPS(3)
IF(TYPE == 3)  ER = EPS(1)+EPS(4)
IF(TYPE == 4)  ER = EPS(1)+EPS(5)
;
;--- LOQ code
IF(BLOD == 0.OR.NPDE_MODE==1) F_FLAG = 0
IF(BLOD == 0.OR.NPDE_MODE==1) Y = IPRED + ER
IF(BLOD == 1.AND.NPDE_MODE==0) F_FLAG = 1
IF(BLOD == 1.AND.NPDE_MODE==0) Y = PHI((LODLN - IPRED) / SD)  + 1.0E-30
IF(BLOD == 1.AND.NPDE_MODE==0) MDVRES = 1
;
$THETA  (-15, -6.6, -0.1) ; 1. exp BETA
$THETA  (-5, -0.64, 5)    ; 2. exp DELTA
$THETA  (1, 13.4, 50)     ; 3. exp V0 URT
$THETA  (-5, 0.89, 5)     ; 4. exp GAMMA
$THETA  (-20, -9, -1)     ; 5. BET LRT
;
$THETA  (-5,-0.01,5) ; 6. IFN
$THETA  (-5,-0.01,5) ; 7. LPVR
$THETA  (-5,-0.01,5) ; 8. RIBA
$THETA  (-5,-0.01,5) ; 9. Age DELT
$THETA  (-5,-0.01,5) ; 10. Sex DELT
;
$OMEGA  BLOCK(3)
0.5            ; 1. BETA_var
0.01 0.1       ; 2. DELTA_var
0.01 0.01 10   ; 3. V0_var
$OMEGA  0.01  FIX
;
$SIGMA  1
$SIGMA  BLOCK(1) 5
$SIGMA  BLOCK(1) SAME
$SIGMA  BLOCK(1) SAME
$SIGMA  BLOCK(1) SAME
;
$ESTIMATION METHOD=SAEM LAPLACE NUMERICAL NOABORT PRINT=1 CTYPE=2 AUTO=1 FILE=saem5a.ext
$ESTIMATION METHOD=IMP EONLY=1 NITER=50 ISAMPLE=3000 FILE=run5a.ext
;

$COVARIANCE UNCONDITIONAL
;
$TABLE      ID TIME MDV EVID IPRED PRED DV NPDE NPD IWRES CWRES ESAMPLE=1000
            NPDTYPE=0 NOPRINT ONEHEADER FILE=sdtab5a
$TABLE      ID BET GAM DELT VL0 ETAS(1:4) NOPRINT ONEHEADER NOAPPEND
            FILE=patab5a
$TABLE      ID SITE SITE_GRP VLQL ASSAY PAPER NOPRINT ONEHEADER NOAPPEND FILE=cotab5a
$TABLE      ID BLOD  LOD10 LOQLN LODLN AGE MALE FEVER ICU ICU_D
            VENT VENT_D DIED TDEATH DISEASE DRUGQL DRUG LPVR IFN IFNA
            IFNB CQHCQ REMD AZIT RIBA UMIF THYM SITE_GRP2 URT LRT
            NOSE ASYMP MILD MODERATE SEVERE NOPRINT ONEHEADER
            NOAPPEND FILE=catab5a

NM-TRAN MESSAGES
 WARNINGS AND ERRORS (IF ANY) FOR PROBLEM    1
 (WARNING  2) NM-TRAN INFERS THAT THE DATA ARE POPULATION.
 (WARNING  3) THERE MAY BE AN ERROR IN THE ABBREVIATED CODE. THE FOLLOWING
 ONE OR MORE RANDOM VARIABLES ARE DEFINED WITH "IF" STATEMENTS THAT DO NOT
 PROVIDE DEFINITIONS FOR BOTH THE "THEN" AND "ELSE" CASES. IF ALL
 CONDITIONS FAIL, THE VALUES OF THESE VARIABLES WILL BE ZERO.
   ER Y
 (WARNING  90) WITH "NUMERICAL", "SLOW" IS ALSO REQUIRED ON $ESTIM RECORD.
 NM-TRAN HAS SUPPLIED THIS OPTION.
 (WARNING  121) INTERACTION IS IMPLIED WITH EM/BAYES ESTIMATION METHODS
 (WARNING  79) SIGMA IS USED ON THE RIGHT. WITH A SUBSEQUENT RUN, IF AN
 INITIAL ESTIMATE OF A DIAGONAL BLOCK OF SIGMA IS TO BE COMPUTED BY
 NONMEM, THAT BLOCK WILL BE SET TO AN IDENTITY MATRIX DURING THAT
 COMPUTATION. THIS COULD LEAD TO AN ARITHMETIC EXCEPTION.*
 (WARNING  90) WITH "NUMERICAL", "SLOW" IS ALSO REQUIRED ON $ESTIM RECORD.
 NM-TRAN HAS SUPPLIED THIS OPTION.
 * THE MAXIMUM NUMBER OF WARNINGS OF ONE OR MORE TYPES WAS REACHED.
 IT IS POSSIBLE THAT SOME WARNING MESSAGES WERE SUPPRESSED.

1NONLINEAR MIXED EFFECTS MODEL PROGRAM (NONMEM) VERSION 7.4.3
 ORIGINALLY DEVELOPED BY STUART BEAL, LEWIS SHEINER, AND ALISON BOECKMANN
 CURRENT DEVELOPERS ARE ROBERT BAUER, ICON DEVELOPMENT SOLUTIONS,
 AND ALISON BOECKMANN. IMPLEMENTATION, EFFICIENCY, AND STANDARDIZATION
 PERFORMED BY NOUS INFOSYSTEMS.
 PROBLEM NO.:         1
 Kim model
 TOT. NO. OF OBS RECS:     2945
 TOT. NO. OF INDIVIDUALS:      317
 GENERAL NONLINEAR KINETICS MODEL WITH STIFF/NONSTIFF EQUATIONS (LSODA, ADVAN13)
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 #TBLN:      1
 #METH: Stochastic Approximation Expectation-Maximization (No Prior)
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
 #TERM:
 STOCHASTIC PORTION WAS COMPLETED
 REDUCED STOCHASTIC PORTION WAS COMPLETED

 ETABAR IS THE ARITHMETIC MEAN OF THE ETA-ESTIMATES,
 AND THE P-VALUE IS GIVEN FOR THE NULL HYPOTHESIS THAT THE TRUE MEAN IS 0.

 ETABAR:         7.3898E-05  9.4898E-06 -1.5016E-05 -1.9431E-06
 SE:             1.4370E-01  2.5443E-02  1.8615E-01  1.4172E-04
 N:                     317         317         317         317

 P VAL.:         9.9959E-01  9.9970E-01  9.9994E-01  9.8906E-01

 ETASHRINKSD(%)  4.1356E+01  2.4661E+01  1.0856E+01  9.7473E+01
 ETASHRINKVR(%)  6.5609E+01  4.3240E+01  2.0534E+01  9.9936E+01
 EBVSHRINKSD(%)  4.1358E+01  2.4661E+01  1.0856E+01  9.8481E+01
 EBVSHRINKVR(%)  6.5611E+01  4.3240E+01  2.0534E+01  9.9977E+01
 EPSSHRINKSD(%)  5.9360E+00  5.9360E+00  2.2673E+00  1.0000E-10  2.2040E+00
 EPSSHRINKVR(%)  1.1520E+01  1.1520E+01  4.4833E+00  1.0000E-10  4.3594E+00


 TOTAL DATA POINTS NORMALLY DISTRIBUTED (N):         2239
 N*LOG(2PI) CONSTANT TO OBJECTIVE FUNCTION:    4115.0067516905247
 OBJECTIVE FUNCTION VALUE WITHOUT CONSTANT:    9163.5767394596314
 OBJECTIVE FUNCTION VALUE WITH CONSTANT:       13278.583491150155
 REPORTED OBJECTIVE FUNCTION DOES NOT CONTAIN CONSTANT

 TOTAL EFFECTIVE ETAS (NIND*NETA):                          1268
 NIND*NETA*LOG(2PI) CONSTANT TO OBJECTIVE FUNCTION:    2330.4281202070497
 OBJECTIVE FUNCTION VALUE WITHOUT CONSTANT:    9163.5767394596314
 OBJECTIVE FUNCTION VALUE WITH CONSTANT:       11494.004859666682
 REPORTED OBJECTIVE FUNCTION DOES NOT CONTAIN CONSTANT


 #TERE:
 Elapsed estimation  time in seconds:  8330.55
 Elapsed covariance  time in seconds:     0.02

 ********************           STOCHASTIC APPROXIMATION EXPECTATION-MAXIMIZATION (NO PRIOR)         ********************
 #OBJT:**************                        FINAL VALUE OF LIKELIHOOD FUNCTION                      ********************
 #OBJV:********************************************     9163.577       **************************************************

 ********************           STOCHASTIC APPROXIMATION EXPECTATION-MAXIMIZATION (NO PRIOR)         ********************
 ********************                             FINAL PARAMETER ESTIMATE                           ********************

 THETA - VECTOR OF FIXED EFFECTS PARAMETERS   *********
         TH 1      TH 2      TH 3      TH 4      TH 5      TH 6      TH 7      TH 8      TH 9      TH10
        -6.89E+00 -5.15E-01  1.33E+01  8.28E-01 -6.97E+00  5.58E-01  2.64E-01  3.88E-01 -7.22E-02 -1.46E-01

 OMEGA - COV MATRIX FOR RANDOM EFFECTS - ETAS  ********
         ETA1      ETA2      ETA3      ETA4
 ETA1
+        1.91E+01
 ETA2
+       -4.96E-01  3.63E-01
 ETA3
+       -9.39E+00  7.69E-01  1.39E+01
 ETA4
+        0.00E+00  0.00E+00  0.00E+00  1.00E-02

 SIGMA - COV MATRIX FOR RANDOM EFFECTS - EPSILONS  ****
         EPS1      EPS2      EPS3      EPS4      EPS5
 EPS1
+        1.16E+00
 EPS2
+        0.00E+00  7.95E+00
 EPS3
+        0.00E+00  0.00E+00  7.95E+00
 EPS4
+        0.00E+00  0.00E+00  0.00E+00  7.95E+00
 EPS5
+        0.00E+00  0.00E+00  0.00E+00  0.00E+00  7.95E+00

 OMEGA - CORR MATRIX FOR RANDOM EFFECTS - ETAS  *******
         ETA1      ETA2      ETA3      ETA4
 ETA1
+        4.37E+00
 ETA2
+       -1.89E-01  6.02E-01
 ETA3
+       -5.77E-01  3.43E-01  3.72E+00
 ETA4
+        0.00E+00  0.00E+00  0.00E+00  1.00E-01

 SIGMA - CORR MATRIX FOR RANDOM EFFECTS - EPSILONS  ***
         EPS1      EPS2      EPS3      EPS4      EPS5
 EPS1
+        1.08E+00
 EPS2
+        0.00E+00  2.82E+00
 EPS3
+        0.00E+00  0.00E+00  2.82E+00
 EPS4
+        0.00E+00  0.00E+00  0.00E+00  2.82E+00
 EPS5
+        0.00E+00  0.00E+00  0.00E+00  0.00E+00  2.82E+00

 ********************           STOCHASTIC APPROXIMATION EXPECTATION-MAXIMIZATION (NO PRIOR)         ********************
 ********************                          STANDARD ERROR OF ESTIMATE (S)                        ********************

 THETA - VECTOR OF FIXED EFFECTS PARAMETERS   *********
         TH 1      TH 2      TH 3      TH 4      TH 5      TH 6      TH 7      TH 8      TH 9      TH10
         2.41E+00  5.49E-02  2.57E-01  3.32E-01  8.57E-03  7.77E-04  1.02E-04  5.65E-04  1.57E-05  3.66E-05

 OMEGA - COV MATRIX FOR RANDOM EFFECTS - ETAS  ********
         ETA1      ETA2      ETA3      ETA4
 ETA1
+        1.36E+01
 ETA2
+        1.02E+00  5.91E-02
 ETA3
+        4.27E+00  2.53E-01  1.59E+00
 ETA4
+        0.00E+00  0.00E+00  0.00E+00  0.00E+00

 SIGMA - COV MATRIX FOR RANDOM EFFECTS - EPSILONS  ****
         EPS1      EPS2      EPS3      EPS4      EPS5
 EPS1
+        3.31E-01
 EPS2
+        0.00E+00  2.79E-01
 EPS3
+        0.00E+00  0.00E+00  0.00E+00
 EPS4
+        0.00E+00  0.00E+00  0.00E+00  0.00E+00
 EPS5
+        0.00E+00  0.00E+00  0.00E+00  0.00E+00  0.00E+00

 OMEGA - CORR MATRIX FOR RANDOM EFFECTS - ETAS  *******
         ETA1      ETA2      ETA3      ETA4
 ETA1
+        1.56E+00
 ETA2
+        3.63E-01  4.90E-02
 ETA3
+        2.21E-01  9.76E-02  2.13E-01
 ETA4
+       ......... ......... ......... .........

 SIGMA - CORR MATRIX FOR RANDOM EFFECTS - EPSILONS  ***
         EPS1      EPS2      EPS3      EPS4      EPS5
 EPS1
+        1.54E-01
 EPS2
+       .........  4.95E-02
 EPS3
+       ......... ......... .........
 EPS4
+       ......... ......... ......... .........
 EPS5
+       ......... ......... ......... ......... .........
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 #TBLN:      2
 #METH: Objective Function Evaluation by Importance Sampling (No Prior)
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
 #TERM:
 EXPECTATION ONLY PROCESS STATISTICALLY COMPLETED

 ETABAR IS THE ARITHMETIC MEAN OF THE ETA-ESTIMATES,
 AND THE P-VALUE IS GIVEN FOR THE NULL HYPOTHESIS THAT THE TRUE MEAN IS 0.

 ETABAR:         7.3468E-03 -1.4788E-03 -6.8523E-04  1.4769E-04
 SE:             1.4398E-01  2.5526E-02  1.8630E-01  1.6311E-04
 N:                     317         317         317         317

 P VAL.:         9.5930E-01  9.5380E-01  9.9707E-01  3.6523E-01

 ETASHRINKSD(%)  4.1242E+01  2.4414E+01  1.0784E+01  9.7091E+01
 ETASHRINKVR(%)  6.5475E+01  4.2867E+01  2.0405E+01  9.9915E+01
 EBVSHRINKSD(%)  4.1342E+01  2.4848E+01  1.0831E+01  9.7731E+01
 EBVSHRINKVR(%)  6.5592E+01  4.3522E+01  2.0488E+01  9.9949E+01
 EPSSHRINKSD(%)  6.0494E+00  6.0494E+00  2.1779E+00  1.0000E-10  1.5989E+00
 EPSSHRINKVR(%)  1.1733E+01  1.1733E+01  4.3083E+00  1.0000E-10  3.1723E+00


 TOTAL DATA POINTS NORMALLY DISTRIBUTED (N):         2239
 N*LOG(2PI) CONSTANT TO OBJECTIVE FUNCTION:    4115.0067516905247
 OBJECTIVE FUNCTION VALUE WITHOUT CONSTANT:    9572.7075364382781
 OBJECTIVE FUNCTION VALUE WITH CONSTANT:       13687.714288128802
 REPORTED OBJECTIVE FUNCTION DOES NOT CONTAIN CONSTANT

 TOTAL EFFECTIVE ETAS (NIND*NETA):                          1268


 #TERE:
 Elapsed estimation  time in seconds:  1876.71

 Number of Negative Eigenvalues in Matrix=           6
 Most negative value=  -2190404796.9774933
 Most positive value=   651.17925241338673
 Forcing positive definiteness
 Root mean square deviation of matrix from original=    1.9999999999998419

 Elapsed covariance  time in seconds: 19031.30

 ********************         OBJECTIVE FUNCTION EVALUATION BY IMPORTANCE SAMPLING (NO PRIOR)        ********************
 #OBJT:**************                        FINAL VALUE OF OBJECTIVE FUNCTION                       ********************
 #OBJV:********************************************     9572.708       **************************************************

 ********************         OBJECTIVE FUNCTION EVALUATION BY IMPORTANCE SAMPLING (NO PRIOR)        ********************
 ********************                             FINAL PARAMETER ESTIMATE                           ********************

 THETA - VECTOR OF FIXED EFFECTS PARAMETERS   *********
         TH 1      TH 2      TH 3      TH 4      TH 5      TH 6      TH 7      TH 8      TH 9      TH10
        -6.89E+00 -5.15E-01  1.33E+01  8.28E-01 -6.97E+00  5.58E-01  2.64E-01  3.88E-01 -7.22E-02 -1.46E-01

 OMEGA - COV MATRIX FOR RANDOM EFFECTS - ETAS  ********
         ETA1      ETA2      ETA3      ETA4
 ETA1
+        1.91E+01
 ETA2
+       -4.96E-01  3.63E-01
 ETA3
+       -9.39E+00  7.69E-01  1.39E+01
 ETA4
+        0.00E+00  0.00E+00  0.00E+00  1.00E-02

 SIGMA - COV MATRIX FOR RANDOM EFFECTS - EPSILONS  ****
         EPS1      EPS2      EPS3      EPS4      EPS5
 EPS1
+        1.16E+00
 EPS2
+        0.00E+00  7.95E+00
 EPS3
+        0.00E+00  0.00E+00  7.95E+00
 EPS4
+        0.00E+00  0.00E+00  0.00E+00  7.95E+00
 EPS5
+        0.00E+00  0.00E+00  0.00E+00  0.00E+00  7.95E+00

 OMEGA - CORR MATRIX FOR RANDOM EFFECTS - ETAS  *******
         ETA1      ETA2      ETA3      ETA4
 ETA1
+        4.37E+00
 ETA2
+       -1.89E-01  6.02E-01
 ETA3
+       -5.77E-01  3.43E-01  3.72E+00
 ETA4
+        0.00E+00  0.00E+00  0.00E+00  1.00E-01

 SIGMA - CORR MATRIX FOR RANDOM EFFECTS - EPSILONS  ***
         EPS1      EPS2      EPS3      EPS4      EPS5
 EPS1
+        1.08E+00
 EPS2
+        0.00E+00  2.82E+00
 EPS3
+        0.00E+00  0.00E+00  2.82E+00
 EPS4
+        0.00E+00  0.00E+00  0.00E+00  2.82E+00
 EPS5
+        0.00E+00  0.00E+00  0.00E+00  0.00E+00  2.82E+00

 ********************         OBJECTIVE FUNCTION EVALUATION BY IMPORTANCE SAMPLING (NO PRIOR)        ********************
 ********************                         STANDARD ERROR OF ESTIMATE (RSR)                       ********************

 THETA - VECTOR OF FIXED EFFECTS PARAMETERS   *********
         TH 1      TH 2      TH 3      TH 4      TH 5      TH 6      TH 7      TH 8      TH 9      TH10
         7.78E-01  5.13E-02  2.51E-01  3.89E-01  1.31E-04  1.74E-05  1.80E-06  3.41E-05  8.78E-07  1.06E-06

 OMEGA - COV MATRIX FOR RANDOM EFFECTS - ETAS  ********
         ETA1      ETA2      ETA3      ETA4
 ETA1
+        3.95E+00
 ETA2
+        7.53E-01  4.67E-02
 ETA3
+        3.04E+00  2.17E-01  1.60E+00
 ETA4
+        0.00E+00  0.00E+00  0.00E+00  0.00E+00

 SIGMA - COV MATRIX FOR RANDOM EFFECTS - EPSILONS  ****
         EPS1      EPS2      EPS3      EPS4      EPS5
 EPS1
+        1.10E+00
 EPS2
+        0.00E+00  1.17E+00
 EPS3
+        0.00E+00  0.00E+00  0.00E+00
 EPS4
+        0.00E+00  0.00E+00  0.00E+00  0.00E+00
 EPS5
+        0.00E+00  0.00E+00  0.00E+00  0.00E+00  0.00E+00

 OMEGA - CORR MATRIX FOR RANDOM EFFECTS - ETAS  *******
         ETA1      ETA2      ETA3      ETA4
 ETA1
+        4.52E-01
 ETA2
+        2.68E-01  3.88E-02
 ETA3
+        1.70E-01  8.34E-02  2.15E-01
 ETA4
+       ......... ......... ......... .........

 SIGMA - CORR MATRIX FOR RANDOM EFFECTS - EPSILONS  ***
         EPS1      EPS2      EPS3      EPS4      EPS5
 EPS1
+        5.11E-01
 EPS2
+       .........  2.07E-01
 EPS3
+       ......... ......... .........
 EPS4
+       ......... ......... ......... .........
 EPS5
+       ......... ......... ......... ......... .........
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 Elapsed postprocess time in seconds:    52.50
 Elapsed finaloutput time in seconds:     0.35
 #CPUT: Total CPU Time in Seconds,    29289.297
